*Heading
 Calcul GBS et Tour
** Job name: Job-GBS-Tower Model name: Model-1
** Generated by: Abaqus/CAE Learning Edition 2025
*Preprint, echo=NO, model=NO, history=NO, contact=NO
**
** PARTS
**
*Part, name=GBS_Fused
*Node
      1,          9.5,   1.70000005,           0.
      2,          10.,   1.70000005,           0.
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*Element, type=C3D4
  1, 129,  34,  51,  33
  2, 128,  19, 129,  20
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*Nset, nset=Set_Material_WholePart, generate
   1,  310,    1
*Elset, elset=Set_Material_WholePart, generate
   1,  934,    1
*Elset, elset=_GBS_Outer_Surface_S1, internal
  60,  64,  69,  95, 124, 128
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*Elset, elset=_GBS_Outer_Surface_S3, internal
   1,   4,   7,  10,  15,  31
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*Elset, elset=_GBS_Outer_Surface_S2, internal
  65,  97,  98, 109, 255, 269
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*Elset, elset=_GBS_Outer_Surface_S4, internal
  61,  70,  78, 254, 258, 259
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*Surface, type=ELEMENT, name=GBS_Outer_Surface
_GBS_Outer_Surface_S1, S1
_GBS_Outer_Surface_S3, S3
_GBS_Outer_Surface_S2, S2
_GBS_Outer_Surface_S4, S4
** Section: Section_Concrete_C50
*Solid Section, elset=Set_Material_WholePart, material=Concrete_C50
,
*End Part
**
*Part, name=Tower
*Node
      1,         0.25,          50.,  0.433012694
      2,        -0.25,          50.,  0.433012694
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*Element, type=C3D20R
 1,  14,   6,   5,  13,  33,  25,  24,  32, 175, 174, 173, 172, 176, 177, 178,
    179, 181, 180, 182, 183
 2,  17,  12,  13,   5,  36,  31,  32,  24, 186, 185, 173, 184, 187, 188, 178,
    189, 191, 190, 183, 182
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*Nset, nset=Set_Material_WholePart, generate
   1,  602,    1
*Elset, elset=Set_Material_WholePart, generate
  1,  96,   1
*Elset, elset=_Tower_Lateral_Surface_S6, internal
  1,  9, 13, 21, 25, 33, 37, 45, 49, 57, 61, 69, 73, 81, 85, 93
*Elset, elset=_Tower_Lateral_Surface_S4, internal
  2,  5, 14, 17, 26, 29, 38, 41, 50, 53, 62, 65, 74, 77, 86, 89
*Elset, elset=_Tower_Lateral_Surface_S3, internal, generate
  4,  88,  12
*Elset, elset=_Tower_Lateral_Surface_S5, internal
  8, 10, 11, 20, 22, 23
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*Surface, type=ELEMENT, name=Tower_Lateral_Surface
_Tower_Lateral_Surface_S6, S6
_Tower_Lateral_Surface_S4, S4
_Tower_Lateral_Surface_S3, S3
_Tower_Lateral_Surface_S5, S5
** Section: Section_Steel_S355
*Solid Section, elset=Set_Material_WholePart, material=Steel_S355
,
*End Part
**
**
** ASSEMBLY
**
*Assembly, name=Assembly
**
*Instance, name=GBS-1, part=GBS_Fused
*End Instance
**
*Instance, name=Tower-1, part=Tower
          0.,        45.04,           0.
*End Instance
**
*Node
      1,           0.,   45.0400009,           0.
*Nset, nset=Base_GBS_Set, instance=GBS-1
   4,  50,  51,  52,  53,  54
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*Elset, elset=Base_GBS_Set, instance=GBS-1
   4,   6,   8,  10,  14,  16
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*Nset, nset=RP_Interface
 1,
*Elset, elset=_Global_Outer_Surface_S1, internal, instance=GBS-1
  60,  64,  69,  95, 124, 128
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*Elset, elset=_Global_Outer_Surface_S3, internal, instance=GBS-1
   1,   4,   7,  10,  15,  31
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*Elset, elset=_Global_Outer_Surface_S3, internal, instance=Tower-1, generate
  4,  88,  12
*Elset, elset=_Global_Outer_Surface_S2, internal, instance=GBS-1
  65,  97,  98, 109, 255, 269
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*Elset, elset=_Global_Outer_Surface_S4, internal, instance=GBS-1
  61,  70,  78, 254, 258, 259
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*Elset, elset=_Global_Outer_Surface_S4, internal, instance=Tower-1
  2,  5, 14, 17, 26, 29, 38, 41, 50, 53, 62, 65, 74, 77, 86, 89
*Elset, elset=_Global_Outer_Surface_S6, internal, instance=Tower-1
  1,  9, 13, 21, 25, 33, 37, 45, 49, 57, 61, 69, 73, 81, 85, 93
*Elset, elset=_Global_Outer_Surface_S5, internal, instance=Tower-1
  8, 10, 11, 20, 22, 23
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*Surface, type=ELEMENT, name=Global_Outer_Surface
_Global_Outer_Surface_S1, S1
_Global_Outer_Surface_S3, S3
_Global_Outer_Surface_S2, S2
_Global_Outer_Surface_S4, S4
_Global_Outer_Surface_S6, S6
_Global_Outer_Surface_S5, S5
*Elset, elset=_Tower_Contact_Surf_S4, internal, instance=Tower-1
  1,  2,  5, 13, 14, 17
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*Elset, elset=_Tower_Contact_Surf_S5, internal, instance=Tower-1
  3,  8, 10, 11, 15, 20
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*Elset, elset=_Tower_Contact_Surf_S6, internal, instance=Tower-1
  1,  6,  7,  9, 12, 13
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*Elset, elset=_Tower_Contact_Surf_S3, internal, instance=Tower-1, generate
  4,  94,   6
*Elset, elset=_Tower_Contact_Surf_S1, internal, instance=Tower-1, generate
  1,  12,   1
*Elset, elset=_Tower_Contact_Surf_S2, internal, instance=Tower-1, generate
 85,  96,   1
*Surface, type=ELEMENT, name=Tower_Contact_Surf
_Tower_Contact_Surf_S4, S4
_Tower_Contact_Surf_S5, S5
_Tower_Contact_Surf_S6, S6
_Tower_Contact_Surf_S2, S2
_Tower_Contact_Surf_S3, S3
_Tower_Contact_Surf_S1, S1
** Constraint: Coupling_Pipe_GBS
*Coupling, constraint name=Coupling_Pipe_GBS, ref node=RP_Interface, surface=Tower_Contact_Surf
*Kinematic
*End Assembly
*Amplitude, name=Amp_Tabular_Z
             0.,              0.,              1.,             0.5,              2.,              1.,              3.,             0.5
             4.,              0.
**
** MATERIALS
**
*Material, name=Concrete_C50
*Density
2400.,
*Elastic
 3e+10, 0.2
*Material, name=Steel_S355
*Density
7850.,
*Elastic
 2.1e+11, 0.3
**
** BOUNDARY CONDITIONS
**
** Name: BC_Encastrement_Base Type: Symmetry/Antisymmetry/Encastre
*Boundary
Base_GBS_Set, ENCASTRE
** ----------------------------------------------------------------
**
** STEP: Step_BC
**
*Step, name=Step_BC, nlgeom=NO
*Static
0.08, 4., 4e-05, 0.08
**
** BOUNDARY CONDITIONS
**
** Name: BC_Interface Type: Displacement/Rotation
*Boundary
RP_Interface, 1, 1
RP_Interface, 2, 2
RP_Interface, 3, 3
RP_Interface, 4, 4
RP_Interface, 5, 5
RP_Interface, 6, 6
**
** LOADS
**
** Name: Load_Amp_Tabular_Z_Global_Outer_Surface_(0.0, 0.0, 0.1)   Type: Surface traction
*Dsload, amplitude=Amp_Tabular_Z
Global_Outer_Surface, TRVEC, 10., 0., 0., 1.
**
** OUTPUT REQUESTS
**
*Restart, write, frequency=0
**
** FIELD OUTPUT: F-Output-1
**
*Output, field, variable=PRESELECT
**
** HISTORY OUTPUT: H-Output-1
**
*Output, history, variable=PRESELECT
*End Step
